// SBML level 3 version 2

model __main()

  // Compartments:
  compartment BrainISF = V_BrainISF;
  compartment CSF = V_CSF;
  compartment IV = V_IV;
  compartment Peripheral = V_Peripheral;
  compartment Plasma = V_Plasma;

  // Species:
  substanceOnly species AB42_BrainISF in BrainISF = 0.970534436;
  substanceOnly species AB42_CSF in CSF = 0.411725338;
  substanceOnly species AB42_Oligomer_BrainISF in BrainISF = 95.4165;
  substanceOnly species AB42_Oligomer_CSF in CSF = 0.002809592;
  substanceOnly species AB42_Oligomer_Plasma in Plasma = 4.51e-11;
  substanceOnly species AB42_Oligomer__Antibody_BrainISF in BrainISF = 1.27e-42;
  substanceOnly species AB42_Oligomer__Antibody_CSF in CSF = 3.45e-47;
  substanceOnly species AB42_Oligomer__Antibody_Plasma in Plasma = 1.12e-48;
  substanceOnly species AB42_Oligomer__Antibody__FcR_BrainISF in BrainISF = 1.27e-46;
  substanceOnly species AB42_Plaque_BrainISF in BrainISF = 1502.335;
  substanceOnly species AB42_Plaque__Antibody_BrainISF in BrainISF = 2e-41;
  substanceOnly species AB42_Plaque__Antibody__FcR_BrainISF in BrainISF = 1.99e-45;
  substanceOnly species AB42_Plasma in Plasma = 0.341592701;
  substanceOnly species AB42__Antibody_BrainISF in BrainISF = 2.32e-47;
  substanceOnly species AB42__Antibody_CSF in CSF = 8.68e-48;
  substanceOnly species AB42__Antibody_Plasma in Plasma = 1.43e-45;
  substanceOnly species APP_BrainISF in BrainISF = 5.017106;
  substanceOnly species APP_Plasma in Plasma = 28.03742;
  substanceOnly species APP__BACE_BrainISF in BrainISF = 0.001357164;
  substanceOnly species APP__BACE_Plasma in Plasma = 0.007002607;
  substanceOnly species Antibody_BrainISF in BrainISF = 6.24e-44;
  substanceOnly species Antibody_CSF in CSF = 2.93e-44;
  substanceOnly species Antibody_IV in IV;
  substanceOnly species Antibody_Peripheral in Peripheral = 4.59e-40;
  substanceOnly species Antibody_Plasma in Plasma = 3000000;
  substanceOnly species BACE_BrainISF in BrainISF = 8.47229;
  substanceOnly species BACE_Plasma in Plasma = 89.91336;
  substanceOnly species CTFbeta_BrainISF in BrainISF = 0.024830791;
  substanceOnly species CTFbeta_Plasma in Plasma = 0.128122552;
  substanceOnly species CTFbeta__GammaSecretase_BrainISF in BrainISF = 0.005747989;
  substanceOnly species CTFbeta__GammaSecretase_Plasma in Plasma = 0.029658101;
  substanceOnly species FcR_BrainISF in BrainISF = 0.261000312;
  substanceOnly species GammaSecretase_BrainISF in BrainISF = 13050.28;
  substanceOnly species GammaSecretase_Plasma in Plasma = 150000.5;
  substanceOnly species SolubleBACE_BrainISF in BrainISF = 0.01063311;
  substanceOnly species SolubleBACE_CSF in CSF = 0.003970015;
  substanceOnly species SolubleBACE_Plasma in Plasma = 0.295959743;

  // Parameters:
  V_BrainISF = 0.261;
  V_CSF = 0.139;
  V_IV = 1;
  V_Peripheral = 3;
  V_Plasma = 3;
  kinfusion = 0;
  kclearmAb = 1.4586e-6;
  k12mAb = 2.5e-6;
  k21mAb = 1e-6;
  k13mAb = 1.7222e-9;
  k31mAb = 4.1667e-5;
  k14mAb = 1.6045e-6;
  k41mAb = 0.0032;
  k43mAb = 1.5509e-5;
  ksynthAPP_plasma = 0.0014;
  kclearAPP = 4.8135e-5;
  ksynthBACE_plasma = 0.0011;
  kclearBACE = 1.2034e-5;
  kclearBACEs = 6.418e-5;
  ksynthGamma_plasma = 28.8811;
  kclearGamma = 0.00019254;
  kcleave = 2e-7;
  konPP = 0.001;
  koffBACE = 119.9928;
  kcatBACE = 0.0072;
  koffGamma = 215.9983;
  kcatGamma = 0.0017;
  ksynthAPP_bisf = 0.00025127;
  ksynthBACE_bisf = 0.00010365;
  ksynthGamma_bisf = 2.5127;
  kM2G = 1.4e-5;
  kG2M_plasma = 140000;
  kclearAbeta_plasma = 9.627e-5;
  kclearAolig_plasma = 9.627e-5;
  kG2M_csf = 0.0028;
  kG2M_bisf = 1.4e-8;
  kclearAbeta_bisf = 1.9254e-5;
  kclearAolig_bisf = 2.204e-8;
  kG2P = 7e-8;
  kP2G_bisf = 7e-11;
  kclearAplaque_bisf = 4.408e-9;
  k13Abeta = 1.7222e-9;
  k31Abeta = 4.1667e-5;
  k14Abeta = 0.00014811;
  k41Abeta = 1.4811e-5;
  k43Abeta = 1.5509e-5;
  k13Aolig = 1.7222e-9;
  k31Aolig = 4.1667e-5;
  k14Aolig = 1.4811e-6;
  k41Aolig = 1.4811e-8;
  k43Aolig = 2.3264e-8;
  k13BACE = 1.7222e-9;
  k31BACE = 4.1667e-5;
  k14BACE = 2.0056e-8;
  k41BACE = 8.0226e-5;
  k43BACE = 1.5509e-5;
  kmAb0 = 10;
  kmAb1 = 0.018;
  k14mix = 1.6045e-6;
  k41mix = 1.4811e-8;
  k43mix = 2.3264e-8;
  konPD = 0.001;
  kmAb2 = 0.018;
  ksynthFcR_bisf = 5.0253e-5;
  kclearFcR = 0.00019254;
  konPF = 0.001;
  koffPF = 10;
  kcatADCP = 0.0036;

  // Assignment rules:
  totalmAbPlasma := Antibody_Plasma + AB42__Antibody_Plasma + AB42_Oligomer__Antibody_Plasma;
  totalmAbCSF := Antibody_CSF + AB42__Antibody_CSF + AB42_Oligomer__Antibody_CSF;
  totalAbetaPlasma := AB42_Plasma + AB42__Antibody_Plasma;
  totaloligPlasma := AB42_Oligomer_Plasma + AB42_Oligomer__Antibody_Plasma;
  totalPlaque := AB42_Plaque_BrainISF + AB42_Plaque__Antibody_BrainISF + AB42_Plaque__Antibody__FcR_BrainISF;
  totaloligISF := AB42_Oligomer_BrainISF + AB42_Oligomer__Antibody_BrainISF;
  totalAbetaBrainISF := AB42_BrainISF + AB42__Antibody_BrainISF;

  // Reactions:
  Flow_IV_mAb_: Antibody_IV -> Antibody_Plasma; kinfusion*(Antibody_IV/V_IV)*V_IV;
  Clear_Plasma_mAb_: Antibody_Plasma -> ; kclearmAb*(Antibody_Plasma/V_Plasma)*V_Plasma;
  Flow_Plasma_Peripheral_mAb_: Antibody_Plasma -> Antibody_Peripheral; k12mAb*(Antibody_Plasma/V_Plasma)*V_Plasma;
  Flow_Peripheral_Plasma_mAb_: Antibody_Peripheral -> Antibody_Plasma; k21mAb*(Antibody_Peripheral/V_Peripheral)*V_Peripheral;
  Flow_Plasma_CSF_mAb_: Antibody_Plasma -> Antibody_CSF; k13mAb*(Antibody_Plasma/V_Plasma)*V_Plasma;
  Flow_CSF_Plasma_mAb_: Antibody_CSF -> Antibody_Plasma; k31mAb*(Antibody_CSF/V_CSF)*V_CSF;
  Flow_Plasma_BrainISF_mAb_: Antibody_Plasma -> Antibody_BrainISF; k14mAb*(Antibody_Plasma/V_Plasma)*V_Plasma;
  Flow_BrainISF_Plasma_mAb_: Antibody_BrainISF -> Antibody_Plasma; k41mAb*(Antibody_BrainISF/V_BrainISF)*V_BrainISF;
  Flow_BrainISF_CSF_mAb_: Antibody_BrainISF -> Antibody_CSF; k43mAb*(Antibody_BrainISF/V_BrainISF)*V_BrainISF;
  Synth_APP_Plasma: -> APP_Plasma; ksynthAPP_plasma;
  Clear_APP_Plasma: APP_Plasma -> ; kclearAPP*(APP_Plasma/V_Plasma)*V_Plasma;
  Synth_BACE_Plasma: -> BACE_Plasma; ksynthBACE_plasma;
  Clear_BACE_Plasma: BACE_Plasma -> ; kclearBACE*(BACE_Plasma/V_Plasma)*V_Plasma;
  Clear_BACEs_Plasma: SolubleBACE_Plasma -> ; kclearBACEs*(SolubleBACE_Plasma/V_Plasma)*V_Plasma;
  Synth_GammaSecretase_Plasma: -> GammaSecretase_Plasma; ksynthGamma_plasma;
  Clear_GammaSecretase_Plasma: GammaSecretase_Plasma -> ; kclearGamma*(GammaSecretase_Plasma/V_Plasma)*V_Plasma;
  Cleave_BACE_Plasma: BACE_Plasma -> SolubleBACE_Plasma; kcleave*(BACE_Plasma/V_Plasma)*V_Plasma;
  Bind_APP_BACE_Plasma_fwd: APP_Plasma + BACE_Plasma -> APP__BACE_Plasma; konPP*(APP_Plasma/V_Plasma)*(BACE_Plasma/V_Plasma)*V_Plasma;
  Bind_APP_BACE_Plasma_rev: APP__BACE_Plasma -> APP_Plasma + BACE_Plasma; koffBACE*(APP__BACE_Plasma/V_Plasma)*V_Plasma;
  Cat_APP_BACE_Plasma: APP__BACE_Plasma -> CTFbeta_Plasma + BACE_Plasma; kcatBACE*(APP__BACE_Plasma/V_Plasma)*V_Plasma;
  Bind_CTFb_Gamma_Plasma_fwd: CTFbeta_Plasma + GammaSecretase_Plasma -> CTFbeta__GammaSecretase_Plasma; konPP*(CTFbeta_Plasma/V_Plasma)*(GammaSecretase_Plasma/V_Plasma)*V_Plasma;
  Bind_CTFb_Gamma_Plasma_rev: CTFbeta__GammaSecretase_Plasma -> CTFbeta_Plasma + GammaSecretase_Plasma; koffGamma*(CTFbeta__GammaSecretase_Plasma/V_Plasma)*V_Plasma;
  Cat_CTFb_Gamma_Plasma: CTFbeta__GammaSecretase_Plasma -> AB42_Plasma + GammaSecretase_Plasma; kcatGamma*(CTFbeta__GammaSecretase_Plasma/V_Plasma)*V_Plasma;
  Synth_APP_BrainISF: -> APP_BrainISF; ksynthAPP_bisf;
  Clear_APP_BrainISF: APP_BrainISF -> ; kclearAPP*(APP_BrainISF/V_BrainISF)*V_BrainISF;
  Synth_BACE_BrainISF: -> BACE_BrainISF; ksynthBACE_bisf;
  Clear_BACE_BrainISF: BACE_BrainISF -> ; kclearBACE*(BACE_BrainISF/V_BrainISF)*V_BrainISF;
  Clear_BACEs_BrainISF: SolubleBACE_BrainISF -> ; kclearBACEs*(SolubleBACE_BrainISF/V_BrainISF)*V_BrainISF;
  Synth_GammaSecretase_BrainISF: -> GammaSecretase_BrainISF; ksynthGamma_bisf;
  Clear_GammaSecretase_BrainISF: GammaSecretase_BrainISF -> ; kclearGamma*(GammaSecretase_BrainISF/V_BrainISF)*V_BrainISF;
  Cleave_BACE_BrainISF: BACE_BrainISF -> SolubleBACE_BrainISF; kcleave*(BACE_BrainISF/V_BrainISF)*V_BrainISF;
  Bind_APP_BACE_BrainISF_fwd: APP_BrainISF + BACE_BrainISF -> APP__BACE_BrainISF; konPP*(APP_BrainISF/V_BrainISF)*(BACE_BrainISF/V_BrainISF)*V_BrainISF;
  Bind_APP_BACE_BrainISF_rev: APP__BACE_BrainISF -> APP_BrainISF + BACE_BrainISF; koffBACE*(APP__BACE_BrainISF/V_BrainISF)*V_BrainISF;
  Cat_APP_BACE_BrainISF: APP__BACE_BrainISF -> CTFbeta_BrainISF + BACE_BrainISF; kcatBACE*(APP__BACE_BrainISF/V_BrainISF)*V_BrainISF;
  Bind_CTFb_Gamma_BrainISF_fwd: CTFbeta_BrainISF + GammaSecretase_BrainISF -> CTFbeta__GammaSecretase_BrainISF; konPP*(CTFbeta_BrainISF/V_BrainISF)*(GammaSecretase_BrainISF/V_BrainISF)*V_BrainISF;
  Bind_CTFb_Gamma_BrainISF_rev: CTFbeta__GammaSecretase_BrainISF -> CTFbeta_BrainISF + GammaSecretase_BrainISF; koffGamma*(CTFbeta__GammaSecretase_BrainISF/V_BrainISF)*V_BrainISF;
  Cat_CTFb_Gamma_BrainISF: CTFbeta__GammaSecretase_BrainISF -> AB42_BrainISF + GammaSecretase_BrainISF; kcatGamma*(CTFbeta__GammaSecretase_BrainISF/V_BrainISF)*V_BrainISF;
  Agg_M2G_G2M_Abeta_Plasma_fwd: AB42_Plasma -> AB42_Oligomer_Plasma; kM2G*(AB42_Plasma/V_Plasma)*V_Plasma;
  Agg_M2G_G2M_Abeta_Plasma_rev: AB42_Oligomer_Plasma -> AB42_Plasma; kG2M_plasma*(AB42_Oligomer_Plasma/V_Plasma)*V_Plasma;
  Clear_Abeta_Plasma: AB42_Plasma -> ; kclearAbeta_plasma*(AB42_Plasma/V_Plasma)*V_Plasma;
  Clear_Aolig_Plasma: AB42_Oligomer_Plasma -> ; kclearAolig_plasma*(AB42_Oligomer_Plasma/V_Plasma)*V_Plasma;
  Agg_M2G_G2M_Abeta_CSF_fwd: AB42_CSF -> AB42_Oligomer_CSF; kM2G*(AB42_CSF/V_CSF)*V_CSF;
  Agg_M2G_G2M_Abeta_CSF_rev: AB42_Oligomer_CSF -> AB42_CSF; kG2M_csf*(AB42_Oligomer_CSF/V_CSF)*V_CSF;
  Agg_M2G_G2M_Abeta_BrainISF_fwd: AB42_BrainISF -> AB42_Oligomer_BrainISF; kM2G*(AB42_BrainISF/V_BrainISF)*V_BrainISF;
  Agg_M2G_G2M_Abeta_BrainISF_rev: AB42_Oligomer_BrainISF -> AB42_BrainISF; kG2M_bisf*(AB42_Oligomer_BrainISF/V_BrainISF)*V_BrainISF;
  Clear_Abeta_BrainISF: AB42_BrainISF -> ; kclearAbeta_bisf*(AB42_BrainISF/V_BrainISF)*V_BrainISF;
  Clear_Aolig_BrainISF: AB42_Oligomer_BrainISF -> ; kclearAolig_bisf*(AB42_Oligomer_BrainISF/V_BrainISF)*V_BrainISF;
  Agg_G2P_P2G_Abeta_BrainISF_fwd: AB42_Oligomer_BrainISF -> AB42_Plaque_BrainISF; kG2P*(AB42_Oligomer_BrainISF/V_BrainISF)*V_BrainISF;
  Agg_G2P_P2G_Abeta_BrainISF_rev: AB42_Plaque_BrainISF -> AB42_Oligomer_BrainISF; kP2G_bisf*(AB42_Plaque_BrainISF/V_BrainISF)*V_BrainISF;
  Clear_Aplaq_BrainISF: AB42_Plaque_BrainISF -> ; kclearAplaque_bisf*(AB42_Plaque_BrainISF/V_BrainISF)*V_BrainISF;
  Flow_13_31_Abeta__fwd: AB42_Plasma -> AB42_CSF; k13Abeta*(AB42_Plasma/V_Plasma)*V_Plasma;
  Flow_13_31_Abeta__rev: AB42_CSF -> AB42_Plasma; k31Abeta*(AB42_CSF/V_CSF)*V_CSF;
  Flow_14_41_Abeta__fwd: AB42_Plasma -> AB42_BrainISF; k14Abeta*(AB42_Plasma/V_Plasma)*V_Plasma;
  Flow_14_41_Abeta__rev: AB42_BrainISF -> AB42_Plasma; k41Abeta*(AB42_BrainISF/V_BrainISF)*V_BrainISF;
  Flow_43_Abeta_: AB42_BrainISF -> AB42_CSF; k43Abeta*(AB42_BrainISF/V_BrainISF)*V_BrainISF;
  Flow_13_31_Aolig__fwd: AB42_Oligomer_Plasma -> AB42_Oligomer_CSF; k13Aolig*(AB42_Oligomer_Plasma/V_Plasma)*V_Plasma;
  Flow_13_31_Aolig__rev: AB42_Oligomer_CSF -> AB42_Oligomer_Plasma; k31Aolig*(AB42_Oligomer_CSF/V_CSF)*V_CSF;
  Flow_14_41_Aolig__fwd: AB42_Oligomer_Plasma -> AB42_Oligomer_BrainISF; k14Aolig*(AB42_Oligomer_Plasma/V_Plasma)*V_Plasma;
  Flow_14_41_Aolig__rev: AB42_Oligomer_BrainISF -> AB42_Oligomer_Plasma; k41Aolig*(AB42_Oligomer_BrainISF/V_BrainISF)*V_BrainISF;
  Flow_43_Aolig_: AB42_Oligomer_BrainISF -> AB42_Oligomer_CSF; k43Aolig*(AB42_Oligomer_BrainISF/V_BrainISF)*V_BrainISF;
  Flow_13_31_BACEs__fwd: SolubleBACE_Plasma -> SolubleBACE_CSF; k13BACE*(SolubleBACE_Plasma/V_Plasma)*V_Plasma;
  Flow_13_31_BACEs__rev: SolubleBACE_CSF -> SolubleBACE_Plasma; k31BACE*(SolubleBACE_CSF/V_CSF)*V_CSF;
  Flow_14_41_BACEs__fwd: SolubleBACE_Plasma -> SolubleBACE_BrainISF; k14BACE*(SolubleBACE_Plasma/V_Plasma)*V_Plasma;
  Flow_14_41_BACEs__rev: SolubleBACE_BrainISF -> SolubleBACE_Plasma; k41BACE*(SolubleBACE_BrainISF/V_BrainISF)*V_BrainISF;
  Flow_43_BACEs_: SolubleBACE_BrainISF -> SolubleBACE_CSF; k43BACE*(SolubleBACE_BrainISF/V_BrainISF)*V_BrainISF;
  Bind_mAb_Abeta_Plasma_fwd: Antibody_Plasma + AB42_Plasma -> AB42__Antibody_Plasma; konPP*(Antibody_Plasma/V_Plasma)*(AB42_Plasma/V_Plasma)*V_Plasma;
  Bind_mAb_Abeta_Plasma_rev: AB42__Antibody_Plasma -> Antibody_Plasma + AB42_Plasma; kmAb0*(AB42__Antibody_Plasma/V_Plasma)*V_Plasma;
  Bind_mAb_Aolig_Plasma_fwd: Antibody_Plasma + AB42_Oligomer_Plasma -> AB42_Oligomer__Antibody_Plasma; konPP*(Antibody_Plasma/V_Plasma)*(AB42_Oligomer_Plasma/V_Plasma)*V_Plasma;
  Bind_mAb_Aolig_Plasma_rev: AB42_Oligomer__Antibody_Plasma -> Antibody_Plasma + AB42_Oligomer_Plasma; kmAb1*(AB42_Oligomer__Antibody_Plasma/V_Plasma)*V_Plasma;
  Bind_mAb_Abeta_CSF_fwd: Antibody_CSF + AB42_CSF -> AB42__Antibody_CSF; konPP*(Antibody_CSF/V_CSF)*(AB42_CSF/V_CSF)*V_CSF;
  Bind_mAb_Abeta_CSF_rev: AB42__Antibody_CSF -> Antibody_CSF + AB42_CSF; kmAb0*(AB42__Antibody_CSF/V_CSF)*V_CSF;
  Bind_mAb_Aolig_CSF_fwd: Antibody_CSF + AB42_Oligomer_CSF -> AB42_Oligomer__Antibody_CSF; konPP*(Antibody_CSF/V_CSF)*(AB42_Oligomer_CSF/V_CSF)*V_CSF;
  Bind_mAb_Aolig_CSF_rev: AB42_Oligomer__Antibody_CSF -> Antibody_CSF + AB42_Oligomer_CSF; kmAb1*(AB42_Oligomer__Antibody_CSF/V_CSF)*V_CSF;
  Bind_mAb_Abeta_BrainISF_fwd: Antibody_BrainISF + AB42_BrainISF -> AB42__Antibody_BrainISF; konPP*(Antibody_BrainISF/V_BrainISF)*(AB42_BrainISF/V_BrainISF)*V_BrainISF;
  Bind_mAb_Abeta_BrainISF_rev: AB42__Antibody_BrainISF -> Antibody_BrainISF + AB42_BrainISF; kmAb0*(AB42__Antibody_BrainISF/V_BrainISF)*V_BrainISF;
  Bind_mAb_Aolig_BrainISF_fwd: Antibody_BrainISF + AB42_Oligomer_BrainISF -> AB42_Oligomer__Antibody_BrainISF; konPP*(Antibody_BrainISF/V_BrainISF)*(AB42_Oligomer_BrainISF/V_BrainISF)*V_BrainISF;
  Bind_mAb_Aolig_BrainISF_rev: AB42_Oligomer__Antibody_BrainISF -> Antibody_BrainISF + AB42_Oligomer_BrainISF; kmAb1*(AB42_Oligomer__Antibody_BrainISF/V_BrainISF)*V_BrainISF;
  Clear_Plasma_mAb_Abeta_: AB42__Antibody_Plasma -> ; kclearmAb*(AB42__Antibody_Plasma/V_Plasma)*V_Plasma;
  Flow_Plasma_CSF_mAb_Abeta__fwd: AB42__Antibody_Plasma -> AB42__Antibody_CSF; k13mAb*(AB42__Antibody_Plasma/V_Plasma)*V_Plasma;
  Flow_Plasma_CSF_mAb_Abeta__rev: AB42__Antibody_CSF -> AB42__Antibody_Plasma; k31mAb*(AB42__Antibody_CSF/V_CSF)*V_CSF;
  Flow_Plasma_BrainISF_mAb_Abeta__fwd: AB42__Antibody_Plasma -> AB42__Antibody_BrainISF; k14mAb*(AB42__Antibody_Plasma/V_Plasma)*V_Plasma;
  Flow_Plasma_BrainISF_mAb_Abeta__rev: AB42__Antibody_BrainISF -> AB42__Antibody_Plasma; k41mAb*(AB42__Antibody_BrainISF/V_BrainISF)*V_BrainISF;
  Flow_BrainISF_CSF_mAb_Abeta_: AB42__Antibody_BrainISF -> AB42__Antibody_CSF; k43mAb*(AB42__Antibody_BrainISF/V_BrainISF)*V_BrainISF;
  Clear_Plasma_mAb_Aolig_: AB42_Oligomer__Antibody_Plasma -> ; kclearmAb*(AB42_Oligomer__Antibody_Plasma/V_Plasma)*V_Plasma;
  Flow_Plasma_CSF_mAb_Aolig__fwd: AB42_Oligomer__Antibody_Plasma -> AB42_Oligomer__Antibody_CSF; k13mAb*(AB42_Oligomer__Antibody_Plasma/V_Plasma)*V_Plasma;
  Flow_Plasma_CSF_mAb_Aolig__rev: AB42_Oligomer__Antibody_CSF -> AB42_Oligomer__Antibody_Plasma; k31mAb*(AB42_Oligomer__Antibody_CSF/V_CSF)*V_CSF;
  Flow_Plasma_BrainISF_mAb_Aolig__fwd: AB42_Oligomer__Antibody_Plasma -> AB42_Oligomer__Antibody_BrainISF; k14mix*(AB42_Oligomer__Antibody_Plasma/V_Plasma)*V_Plasma;
  Flow_Plasma_BrainISF_mAb_Aolig__rev: AB42_Oligomer__Antibody_BrainISF -> AB42_Oligomer__Antibody_Plasma; k41mix*(AB42_Oligomer__Antibody_BrainISF/V_BrainISF)*V_BrainISF;
  Flow_BrainISF_CSF_mAb_Aolig_: AB42_Oligomer__Antibody_BrainISF -> AB42_Oligomer__Antibody_CSF; k43mix*(AB42_Oligomer__Antibody_BrainISF/V_BrainISF)*V_BrainISF;
  Bind_mAb_Aplaq_BrainISF_fwd: Antibody_BrainISF + AB42_Plaque_BrainISF -> AB42_Plaque__Antibody_BrainISF; konPD*(Antibody_BrainISF/V_BrainISF)*(AB42_Plaque_BrainISF/V_BrainISF)*V_BrainISF;
  Bind_mAb_Aplaq_BrainISF_rev: AB42_Plaque__Antibody_BrainISF -> Antibody_BrainISF + AB42_Plaque_BrainISF; kmAb2*(AB42_Plaque__Antibody_BrainISF/V_BrainISF)*V_BrainISF;
  Synth_FcR_BrainISF: -> FcR_BrainISF; ksynthFcR_bisf;
  Clear_FcR_BrainISF: FcR_BrainISF -> ; kclearFcR*(FcR_BrainISF/V_BrainISF)*V_BrainISF;
  Bind_mAb_Aolig_FcR_BrainISF_fwd: AB42_Oligomer__Antibody_BrainISF + FcR_BrainISF -> AB42_Oligomer__Antibody__FcR_BrainISF; konPF*(AB42_Oligomer__Antibody_BrainISF/V_BrainISF)*(FcR_BrainISF/V_BrainISF)*V_BrainISF;
  Bind_mAb_Aolig_FcR_BrainISF_rev: AB42_Oligomer__Antibody__FcR_BrainISF -> AB42_Oligomer__Antibody_BrainISF + FcR_BrainISF; koffPF*(AB42_Oligomer__Antibody__FcR_BrainISF/V_BrainISF)*V_BrainISF;
  Catalysis_ADCP_Aolig_BrainISF: AB42_Oligomer__Antibody__FcR_BrainISF -> FcR_BrainISF; kcatADCP*(AB42_Oligomer__Antibody__FcR_BrainISF/V_BrainISF)*V_BrainISF;
  Bind_mAb_Aplaq_FcR_BrainISF_fwd: AB42_Plaque__Antibody_BrainISF + FcR_BrainISF -> AB42_Plaque__Antibody__FcR_BrainISF; konPF*(AB42_Plaque__Antibody_BrainISF/V_BrainISF)*(FcR_BrainISF/V_BrainISF)*V_BrainISF;
  Bind_mAb_Aplaq_FcR_BrainISF_rev: AB42_Plaque__Antibody__FcR_BrainISF -> AB42_Plaque__Antibody_BrainISF + FcR_BrainISF; koffPF*(AB42_Plaque__Antibody__FcR_BrainISF/V_BrainISF)*V_BrainISF;
  Catalysis_ADCP_Aplaq_BrainISF: AB42_Plaque__Antibody__FcR_BrainISF -> FcR_BrainISF; kcatADCP*(AB42_Plaque__Antibody__FcR_BrainISF/V_BrainISF)*V_BrainISF;
end
